// COMSOL Multiphysics 6.4.0.343 model "0_Simple_TPU_MR_beam_MF_Solid_Mech_axial.mph"
// Outline of the model tree

Parameters
  Air_L = 2*TPU_L  // Air cube side length
  Air_H = 1.3*TPU_L  // Air cylinder length
  Air_R = 8*TPU_R  // Air cylinder radius
  E_min = 10 [kPa]  // No Magnetic field applied
  E_max = 21 [MPa]  // Maximum magnetic field applied
  H_max = 224[kA/m]  // Max magnetic field
  H_test = 0[kA/m]  // Trial magnetic field
  MT_L = 0.5*TPU_L
  TPU_L = 39.74[mm]  // TPU beam Lenght
  MR_L = TPU_L - 2 [mm]  // MR fluid lenght
  TPU_R = 4[mm]  // TPU beam radius
  TPU_th = 2[mm]  // TPU beam thickness
  MR_R = TPU_R - TPU_th  // MR fluid radius
  t_smooth = 0.1* t_end
  t_tot = t_end+ t_smooth
  t_step = 100  // time steps for the simulation
  c_max = 0.08*TPU_L  // Max compression imposed
  v_comp = 50 [mm/s]  // Compression rate
  t_end = c_max/v_comp  // end time of the compression

Functions
  an2: Analytic | funcname = E_eq_lin; expr = 0.001 + 188.58 * H; args = H; fununit = MPa; argunit = kA/m
  pw2: Piecewise "smooth_displacement"
    funcname = pw1
    arg = t
    pieces = 
      {0, t_smooth, (v_comp / (2 * (0.1 * t_end))) * t^2}
      {t_smooth, t_end *2, v_comp * (t - (0.1 * t_end) / 2)}
    argunit = s
    fununit = m

Variables
  var1 "Plots"
    F_tot = surf_stress(solid.sz)
    Area_0 = pi*(TPU_R^2)
    Sigma_eng = abs(F_tot/Area_0)
    Epsilon_eng = abs(v_comp*t/TPU_L)

Couplings
  intop1: Integration on boundaries 3 | axisym = on

Geometry
  geom1 "Geometry 1" (2D axisymmetric, length unit m)
    r1: Rectangle | size = {TPU_R, TPU_L}
    r2: Rectangle (disabled) | size = {MR_R, MR_L}; pos = {0, TPU_L/2 - MR_L/2}
    fin: Finalize "Form Union" | symmetriccoord = 8

Materials
  mat2: Common "TPU" on domains 1
    def: def "Basic"
      density = 1200
      relpermeability = 1
      relpermittivity = 1
    Enu: Enu "Young's modulus and Poisson's ratio"
      E = 7.5[MPa]
      nu = 0.45
  mat3: Common "MR_fluid" (disabled) on no domains
    def: def "Basic"
      relpermeability = 6.5
      density = 3200
    Enu: Enu "Young's modulus and Poisson's ratio"
      E = E_linear(H_test)
      nu = 0.49

Physics
  solid: SolidMechanics on domains 1
    dependent variable u = {u, v, w}
    lemm1: LinearElasticModel "Linear Elastic Material 1" (default)
    axi1: AxialSymmetrySolid "Axial Symmetry 1" (default)
    free1: Free (default)
    init1: init "Initial Values 1" (default)
    disp1: Displacement1 "Prescribed Displacement 1" on boundaries 3
      Direction = {prescribed, free, prescribed}
      U0 = {0, 0, -pw1(t)}
    fix1: Fixed "Fixed Constraint 1" on boundaries 2

Mesh
  mesh1 "Mesh 1"
    size: MeshSizeDefault | hmax = 0.00266; hmin = 1.19E-5; hcurve = 0.3; hgrad = 1.3
    ftri2: FreeTri "Free Triangular 2" on domains 1
      size1: Size on domains 1

Studies
  std1 "Study 1"
    time: Transient "Time Dependent" | tlist = range(0,t_tot/t_step,t_tot); geometricNonlinearity = on

Solver configurations
  sol1 "Solution 1" (study std1)
    v1: Variables "Dependent Variables 1"
    t1: Time "Time-Dependent Solver 1" | timemethod = genalpha
      dDef: Direct
      fc1: FullyCoupled

Datasets
  dset1: Solution | solution = sol1
  dset1solidrev: Revolve2D "Revolution 2D" | data = dset1; startangle = -90; revangle = 225

Plots
  pg1: PlotGroup2D "Stress (solid)" | data = dset1
    surf1: Surface | expr = solid.sz
      def: Deform "Deformation" | expr = {u, w}; descr = Displacement field
  pg2: PlotGroup3D "Stress, 3D (solid)" | data = dset1solidrev
    surf1: Surface | expr = solid.misesGp
      def: Deform "Deformation" | revcoordsys = cylindrical; expr = {u, v, w}; descr = Displacement field
  pg3: PlotGroup1D "Stress-strain_integral" | data = dset1; xlabel = Strain; ylabel = Stress
    glob2: Global
      expr = abs(intop1(solid.sz))/(pi*TPU_R^2)
      unit = N/mm^2
      constUnit = {m, m, m}
      title = STRESS - STRAIN
      xdata = expr
      xdataexpr = abs(v_comp*t)/ TPU_L
      resultinfo = 
        {Plotting_time, 0.2 s}
        {Physical_memory, 1.91 GB}
        {Virtual_memory, 2.32 GB}
        {Number_of_points, 101}
        {Number_of_segments[plot], 100}
  pg9: PlotGroup1D "Stress-strain_reaction_force" | data = dset1; xlabel = Strain (1); ylabel = Stress (N/mm<sup>2</sup>)
    lngr1: LineGraph (disabled) on boundaries 4
      expr = solid.fix1.RFsumz/(pi*TPU_R^2)
      unit = N/mm^2
      descr = Stress
      constUnit = {m, m, m}
      title = STRESS - STRAIN (reaction force)
      xdata = expr
      xdataexpr = solid.disp/TPU_L
      resultinfo = 
        {Plotting_time, 0.7 s}
        {Physical_memory, 1.62 GB}
        {Virtual_memory, 1.72 GB}
        {Number_of_points, 101}
        {Number_of_segments[plot], 0}
    ptgr1: PointGraph on points 2, 4
      expr = solid.fix1.RFsumz/(pi*TPU_R^2)
      unit = N/mm^2
      descr = Stress
      constUnit = {m, m, m}
      title = STRESS - STRAIN (reaction force)
      xdata = expr
      xdataexpr = solid.disp/TPU_L
      resultinfo = 
        {Plotting_time, 0.1 s}
        {Physical_memory, 2.05 GB}
        {Virtual_memory, 2.17 GB}
        {Number_of_points, 202}
        {Number_of_segments[plot], 200}
  pg6: PlotGroup1D "Reaction force" | data = dset1
    lngr1: LineGraph "BOTTOM SURFACE" on boundaries 2, 3
      expr = solid.fix1.RFsumz
      unit = N
      descr = Reaction force, z-component
      constUnit = {m, m, m}
      xdata = expr
      xdataexpr = t
      resultinfo = 
        {Plotting_time, 0.1 s}
        {Physical_memory, 2.00 GB}
        {Virtual_memory, 2.33 GB}
        {Number_of_points, 101}
        {Number_of_segments[plot], 0}
  pg8: PlotGroup1D "Kin.En vs strain en." | data = dset1
    glob1: Global
      expr = {solid.Wk_tot, solid.Ws_tot}
      unit = {J, J}
      descr = {Total kinetic energy, Total elastic strain energy}
      constUnit = {m, m, m}
      resultinfo = 
        {Plotting_time, 0.1 s}
        {Physical_memory, 2.06 GB}
        {Virtual_memory, 2.35 GB}
        {Number_of_points, 202}
        {Number_of_segments[plot], 200}