// COMSOL Multiphysics 6.4.0.343 model "2_Simple_TPU_beam_MF_E_eq_lin_Solid_Mech.mph"
// Outline of the model tree

Parameters
  TPU_L = 39.74[mm]  // TPU beam Lenght
  TPU_R = 4[mm]  // TPU beam radius
  TPU_th = 2[mm]  // TPU beam thickness
  MR_L = TPU_L - 2 [mm]  // MR fluid lenght
  MR_R = TPU_R - TPU_th  // MR fluid radius
  E_min = 10 [kPa]  // No Magnetic field applied
  E_max = 21 [MPa]  // Maximum magnetic field applied
  H_max = 224[kA/m]  // Max magnetic field
  H_test = 100[kA/m]  // Trial magnetic field
  v_comp = 50 [mm/s]  // Compression rate
  c_max = 0.05*TPU_L  // Max compression imposed
  t_end = c_max/v_comp  // end time of the compression
  t_step = 100  // time steps for the simulation
  t_smooth = 0.1* t_end
  t_tot = t_end+ t_smooth

Functions
  an1: Analytic | funcname = E_eq_lin; expr = 0.001 + 188.58 * H; args = H; fununit = kPa; argunit = kA/m
  pw2: Piecewise "smooth_displacement"
    funcname = pw1
    arg = t
    pieces = 
      {0, t_smooth, (v_comp / (2 * t_smooth)) * t^2}
      {t_smooth, t_end *2, v_comp * (t - t_smooth / 2)}
    argunit = s
    fununit = m

Couplings
  intop1: Integration "Upper_surf" on boundaries 7
  intop2: Integration "Middle_surf" on boundaries 6, 13

Geometry
  geom1 "Beam" (3D, length unit mm)
    cyl1: Cylinder "TPU_cylinder" | r = TPU_R; h = TPU_L
    cyl2: Cylinder "MR_cylinder" | r = MR_R; h = MR_L; pos = {0, 0, (TPU_L - MR_L)/2}
    wp1: WorkPlane | quickz = TPU_L/2; unite = on
      c1: Circle | r = TPU_R
    fin: Finalize "Form Union"

Materials
  Flexfill_TPU_92A: Common "TPU" on domains 1, 2
    def: def "Basic"
      density = 1200
      relpermeability = 1
    Enu: Enu "Young's modulus and Poisson's ratio"
      E = 7.5[MPa]
      nu = 0.45
  REHOTECH: Common "MR_fluid" on domains 3, 4
    def: def "Basic"
      relpermeability = 6.5
      density = 3200
    Enu: Enu "Young's modulus and Poisson's ratio"
      E = E_eq_lin(H_test)
      nu = 0.49

Physics
  solid: SolidMechanics on all domains
    dependent variable u = {u, v, w}
    lemm1: LinearElasticModel "Linear Elastic Material 1" (default)
    free1: Free (default)
    init1: init "Initial Values 1" (default)
    disp1: Displacement2 "Compression_Z" on boundaries 7
      Direction = {prescribed, prescribed, prescribed}
      U0 = {0, 0, -pw1(t)}
    fix1: Fixed "Fixed Constraint 1" on boundaries 3

Mesh
  mesh1 "Mesh 1" (physics-controlled)

Studies
  std2 "Study 1"
    param: Parametric "Parametric Sweep" | pname = H_test; plistarr = 0, 112[kA/m], 224[kA/m]; punit = A/m
    time: Transient "Time Dependent" | tlist = range(0,t_tot/t_step,t_tot); geometricNonlinearity = on

Solver configurations
  sol9 "Solution 9" (study std2)
    v1: Variables "Dependent Variables 1"
    t1: Time "Time-Dependent Solver 1"
      fc1: FullyCoupled
      d1: Direct "Suggested Direct Solver (solid)"
  sol11 "Parametric Solutions 1" (study std2)

Datasets
  dset3: Solution | solution = sol9
  dset5: Solution | solution = sol11

Plots
  pg4: PlotGroup3D "Stress (solid)" | data = dset3
    vol1: Volume | expr = solid.sz
      def: Deform "Deformation" | expr = {u, v, w}; descr = Displacement field
  pg3: PlotGroup1D "Stress-strain_integral" | data = dset5; xlabel = Strain; ylabel = Stress
    glob2: Global
      expr = abs(intop2(solid.sz))/(pi*TPU_R^2)
      unit = N/m^2
      constUnit = {m, m, m}
      title = STRESS - STRAIN
      hasmultilevel = on
      xdata = expr
      xdataexpr = abs(v_comp*t)/ TPU_L
      resultinfo = 
        {Plotting_time, 4.1 s}
        {Physical_memory, 2.75 GB}
        {Virtual_memory, 2.91 GB}
        {Number_of_points, 303}
        {Number_of_segments[plot], 300}
  pg9: PlotGroup1D "Stress-strain_reaction_force" | data = dset5; xlabel = Strain (1); ylabel = Stress (N/mm<sup>2</sup>)
    ptgr1: PointGraph on points 3, 9, 18, 24
      expr = solid.fix1.RFsumz/(pi*TPU_R^2)
      unit = N/mm^2
      descr = Stress
      title = STRESS - STRAIN (reaction force)
      hasmultilevel = on
      xdata = expr
      xdataexpr = solid.disp/TPU_L
      resultinfo = 
        {Plotting_time, 0.4 s}
        {Physical_memory, 2.75 GB}
        {Virtual_memory, 2.87 GB}
        {Number_of_points, 1212}
        {Number_of_segments[plot], 1200}
  pg8: PlotGroup1D "Kin.En vs strain en." | data = dset5
    glob1: Global
      expr = {solid.Wk_tot, solid.Ws_tot}
      unit = {J, J}
      descr = {Total kinetic energy, Total elastic strain energy}
      constUnit = {m, m, m}
      hasmultilevel = on
      resultinfo = 
        {Plotting_time, 4.4 s}
        {Physical_memory, 2.82 GB}
        {Virtual_memory, 3.02 GB}
        {Number_of_points, 606}
        {Number_of_segments[plot], 604}
  pg6: PlotGroup1D "Reaction force" | data = dset5
    lngr1: LineGraph on edges 7, 8, 21, 36
      expr = solid.fix1.RFsumz
      unit = N
      descr = Reaction force, z-component
      xdata = expr
      xdataexpr = t
      resultinfo = 
        {Plotting_time, 0.2 s}
        {Physical_memory, 2.84 GB}
        {Virtual_memory, 3.04 GB}
        {Number_of_points, 303}
        {Number_of_segments[plot], 0}