// COMSOL Multiphysics 6.4.0.343 model "3_Simple_TPU_MR_beam_MF_Magnet_E_eq_lin_axial.mph"
// Outline of the model tree

Parameters
  Air_L = 3*TPU_L  // Air cube side length
  TPU_L = 39.74[mm]  // TPU beam Lenght
  TPU_R = 4[mm]  // TPU beam radius
  TPU_th = 2[mm]  // TPU beam thickness
  MR_L = TPU_L - 2 [mm]  // MR fluid lenght
  MR_R = TPU_R - TPU_th  // MR fluid radius
  E_min = 10 [kPa]  // No Magnetic field applied
  E_max = 21 [MPa]  // Maximum magnetic field applied
  H_max = 224[kA/m]  // Max magnetic field
  H_test = 100[kA/m]  // Trial magnetic field
  MT_L = 0.5*TPU_L
  v_comp = 50 [mm/s]  // Compression rate
  c_max = 0.05*TPU_L  // Max compression imposed
  t_end = c_max/v_comp  // end time of the compression
  t_step = 100  // time steps for the simulation
  t_smooth = 0.1* t_end
  t_tot = t_end+ t_smooth
  B_magn = 1[T]

Functions
  an1: Analytic | funcname = E_eq_lin; expr = 0.001 + 188.58 * H; args = H; fununit = kPa; argunit = kA/m
  pw2: Piecewise "smooth_displacement"
    funcname = pw1
    arg = t
    pieces = 
      {0, t_smooth, (v_comp / (2 * t_smooth)) * t^2}
      {t_smooth, t_end *2, v_comp * (t - t_smooth / 2)}
    argunit = s
    fununit = m

Selections
  sel1: Explicit on boundaries 7

Couplings
  intop1: Integration on boundaries 12 | axisym = on

Common definitions
  free1: DeformingDomain on domains 1
  pnmd1: PrescribedNormalMeshDisplacement on boundaries 13 | prescribedNormalDisplacement = -pw1(t)
  pnmd2: PrescribedNormalMeshDisplacement on boundaries 11, 18

Geometry
  geom1 "Geometry 1" (2D axisymmetric, length unit m)
    r1: Rectangle | size = {TPU_R, TPU_L}
    r2: Rectangle | size = {MR_R, MR_L}; pos = {0, TPU_L/2 - MR_L/2}
    r3: Rectangle | size = {MT_L/2, MT_L}; pos = {0, -MT_L}
    r4: Rectangle | size = {Air_L/2, Air_L}; pos = {0, -TPU_L/2 + (-Air_L/2 + TPU_L/2)/2}
    fin: Finalize "Form Union" | symmetriccoord = 8

Materials
  mat1: Common "TPU" on domains 3
    def: def "Basic"
      density = 1200
      relpermeability = 1
      relpermittivity = 1
    Enu: Enu "Young's modulus and Poisson's ratio"
      E = 7.5[MPa]
      nu = 0.45
  mat2: Common "Air" on domains 1
    def: def "Basic"
      thermalexpansioncoefficient = alpha_p(pA,T)
      molarmass = 0.02897[kg/mol]
      bulkviscosity = muB(T)
      relpermeability = 1
      relpermittivity = 1
      dynamicviscosity = eta(T)
      ratioofspecificheat = 1.4
      electricconductivity = 0[S/m]
      heatcapacity = Cp(T)
      density = rho(pA,T)
      thermalconductivity = k(T)
      soundspeed = cs(T)
      eta: Piecewise | arg = T; pieces = {200.0, 1600.0, -8.38278E-7+8.35717342E-8*T^1-7.69429583E-11*T^2+4.6437266E-14*T^3-1.06585607E-17*T^4}; argunit = K; fununit = Pa*s
      Cp: Piecewise | arg = T; pieces = {200.0, 1600.0, 1047.63657-0.372589265*T^1+9.45304214E-4*T^2-6.02409443E-7*T^3+1.2858961E-10*T^4}; argunit = K; fununit = J/(kg*K)
      rho: Analytic | expr = pA*0.02897/R_const[K*mol/J]/T; args = {pA, T}; fununit = kg/m^3; argunit = {Pa, K}
      k: Piecewise | arg = T; pieces = {200.0, 1600.0, -0.00227583562+1.15480022E-4*T^1-7.90252856E-8*T^2+4.11702505E-11*T^3-7.43864331E-15*T^4}; argunit = K; fununit = W/(m*K)
      cs: Analytic | expr = sqrt(1.4*R_const[K*mol/J]/0.02897*T); args = T; fununit = m/s; argunit = K
      an1: Analytic | funcname = alpha_p; expr = -1/rho(pA,T)*d(rho(pA,T),T); args = {pA, T}; fununit = 1/K; argunit = {Pa, K}
      an2: Analytic "Analytic 2a" | funcname = muB; expr = 0.6*eta(T); args = T; fununit = Pa*s; argunit = K
    RefractiveIndex: RefractiveIndex
      n = 1
      ki = 0
    NonlinearModel: NonlinearModel
      BA = def.gamma-1
    idealGas: idealGas
      Rs = R_const/Mn
      heatcapacity = Cp(T)
      ratioofspecificheat = 1.4
      molarmass = 0.02897[kg/mol]
      Cp: Piecewise | arg = T; pieces = {200.0, 1600.0, 1047.63657-0.372589265*T^1+9.45304214E-4*T^2-6.02409443E-7*T^3+1.2858961E-10*T^4}; argunit = K; fununit = J/(kg*K)
  mat3: Common "MR_fluid" on domains 4
    def: def "Basic"
      relpermeability = 6.5
      density = 3200
    Enu: Enu "Young's modulus and Poisson's ratio"
      E = E_eq_lin(mfnc.normH)
      nu = 0.49

Physics
  solid: SolidMechanics on domains 3, 4
    dependent variable u = {u, v, w}
    lemm1: LinearElasticModel "Linear Elastic Material 1" (default)
    axi1: AxialSymmetrySolid "Axial Symmetry 1" (default)
    free1: Free (default)
    init1: init "Initial Values 1" (default)
    disp2: Displacement1 "Prescribed Displacement 2" on boundaries 12
      Direction = {prescribed, free, prescribed}
      U0 = {0, 0, -pw1(t)}
    fix1: Fixed "Fixed Constraint 1" on boundaries 6
  mfnc: MagnetostaticsNoCurrents "Magnetic Fields, No Currents" on domains 1-4
    dependent variable Vm
    fsp1: FreeSpace (default)
    axi1: AxialSymmetry (default)
    mi1: MagneticInsulation (default)
    init1: init "Initial Values 1" (default)
    mag1: Magnet on domains 2
      mur_crel_BH_RemanentFluxDensity_mat = userdef
      mur_crel_BH_RemanentFluxDensity = 1
      normBr_crel_BH_RemanentFluxDensity_mat = userdef
      normBr_crel_BH_RemanentFluxDensity = B_magn
      north1: North on boundaries 6, 16
      south1: South on boundaries 4
    mfcs1: MagneticFluxConservationSolid "Magnetic Flux Conservation in Solids 1" on domains 3, 4
    zsp1: ZeroMagneticScalarPotential on boundaries 2, 13, 18

Mesh
  mesh1 "Mesh 1" (physics-controlled)
    size: MeshSizeDefault | hauto = 3

Studies
  std1 "Study 1"
    param: Parametric "Parametric Sweep" | pname = B_magn; plistarr = range(0, 0.25, 1); punit = T
    time: Transient "Time Dependent" | tlist = range(0,t_end/t_step,t_end); geometricNonlinearity = on

Solver configurations
  sol1 "Solution 1" (study std1)
    v1: Variables "Dependent Variables 1"
    t1: Time "Time-Dependent Solver 1"
      dDef: Direct
      fc1: FullyCoupled | dtech = auto
  sol10 "Parametric Solutions 2" (study std1)

Datasets
  dset3: Solution | solution = sol10
  dset3solidrev: Revolve2D "Revolution 2D 3" | data = dset3; startangle = -90; revangle = 225
  mesh1: Mesh | mesh = mesh1
  dset4: Solution | solution = sol1

Plots
  pg22: PlotGroup2D "Stress (solid) 2" | data = dset3
    surf1: Surface | expr = solid.misesGp
      def: Deform "Deformation" | expr = {u, w}; descr = Displacement field
  pg23: PlotGroup3D "Stress, 3D (solid) 2" | data = dset3solidrev
    surf1: Surface | expr = solid.misesGp
      def: Deform "Deformation" | revcoordsys = cylindrical; expr = {u, v, w}; descr = Displacement field
  pg3: PlotGroup1D "Stress-strain_integral" | data = dset3; xlabel = Strain; ylabel = Stress
    glob2: Global
      expr = abs(intop1(solid.sz))/(pi*TPU_R^2)
      unit = N/mm^2
      constUnit = {m, m, m}
      title = STRESS - STRAIN
      hasmultilevel = on
      xdata = expr
      xdataexpr = abs(v_comp*t)/ TPU_L
      resultinfo = 
        {Plotting_time, 1.3 s}
        {Physical_memory, 1.91 GB}
        {Virtual_memory, 2.17 GB}
        {Number_of_points, 505}
        {Number_of_segments[plot], 500}
  pg9: PlotGroup1D "Stress-strain_reaction_force" | data = dset3; xlabel = Strain (1); ylabel = Stress (N/mm<sup>2</sup>)
    ptgr1: PointGraph on points 6, 11
      expr = solid.fix1.RFsumz/(pi*TPU_R^2)
      unit = N/mm^2
      descr = Stress
      constUnit = {m, m, m}
      title = STRESS - STRAIN (reaction force)
      hasmultilevel = on
      xdata = expr
      xdataexpr = solid.disp/TPU_L
      resultinfo = 
        {Plotting_time, 0.2 s}
        {Physical_memory, 2.84 GB}
        {Virtual_memory, 2.95 GB}
        {Number_of_points, 1010}
        {Number_of_segments[plot], 1000}
  pg27: PlotGroup1D "Reaction force" | data = dset3
    lngr1: LineGraph on boundaries 6
      expr = solid.fix1.RFsumz
      unit = N
      descr = Reaction force, z-component
      constUnit = {m, m, m}
      xdata = expr
      xdataexpr = t
      resultinfo = 
        {Plotting_time, 0.4 s}
        {Physical_memory, 2.24 GB}
        {Virtual_memory, 2.31 GB}
        {Number_of_points, 505}
        {Number_of_segments[plot], 0}
  pg28: PlotGroup1D "Magnetic field norm (A/m)"
    data = dset3
    xlabel = Arc length (m)
    ylabel = Magnetic field norm (A/m)
    lngr1: LineGraph on selection sel1
      expr = mfnc.normH
      unit = A/m
      descr = Magnetic field norm
      resultinfo = 
        {Plotting_time, 1.3 s}
        {Physical_memory, 1.91 GB}
        {Virtual_memory, 2.27 GB}
        {Number_of_points, 770}
        {Number_of_segments[plot], 765}
  pg10: PlotGroup2D "Magnetic Flux Density (mfnc) 1" | data = dset3
    surf1: Surface | expr = mfnc.normB
    str1: Streamline on boundaries 1, 3, 5-12, 14, 15 | expr = {mfnc.Br, mfnc.Bz}
      filt1: Filter | expr = !isScalingSystemDomain
  pg11: PlotGroup3D "Magnetic Flux Density, Revolved Geometry (mfnc) 1" | data = dset3solidrev
    vol1: Volume | expr = mfnc.normB
  pg12: PlotGroup2D "Magnetic Scalar Potential (mfnc) 1" | data = dset3
    surf1: Surface | expr = Vm
    str1: Streamline on boundaries 1, 3, 5-12, 14, 15 | expr = {mfnc.Hr, mfnc.Hz}
      filt1: Filter | expr = !isScalingSystemDomain
  pg29: PlotGroup2D "Mesh Plot 29" | data = dset3
    mesh1: Mesh