// COMSOL Multiphysics 6.4.0.343 model "3_Simple_TPU_beam_MF_Magnets_E_eq_lin.mph"
// Outline of the model tree

Parameters
  TPU_L = 39.74[mm]  // TPU beam Lenght
  TPU_R = 4[mm]  // TPU beam radius
  TPU_th = 2[mm]  // TPU beam thickness
  MR_L = TPU_L - 2 [mm]  // MR fluid lenght
  MR_R = TPU_R -TPU_th  // MR fluid radius
  E_min = 10 [kPa]  // No Magnetic field applied
  E_max = 21 [MPa]  // Maximum magnetic field applied
  H_max = 224[kA/m]  // Max magnetic field
  H_test = 0[kA/m]  // Trial magnetic field
  v_comp = 50 [mm/s]  // Compression rate
  c_max = 0.05*TPU_L  // Max compression imposed
  t_end = c_max/v_comp  // end time of the compression
  t_step = 100  // time steps for the simulation
  H_fixed = 100[kA/m]
  Air_L = 2*TPU_L  // Air cube side length
  MT_L = 0.3*TPU_L
  Air_H = 1.3*TPU_L  // Air cylinder length
  Air_R = 8*TPU_R  // Air cylinder radius
  B_magn = 1[T]
  t_smooth = 0.1* t_end
  t_tot = t_end+ t_smooth

Functions
  an2: Analytic | funcname = E_eq_lin; expr = 0.001 + 188.58 * H; args = H; fununit = kPa; argunit = kA/m
  pw2: Piecewise "smooth_displacement"
    funcname = pw1
    arg = t
    pieces = 
      {0, t_smooth, (v_comp / (2 * t_smooth)) * t^2}
      {t_smooth, t_end *2, v_comp * (t - t_smooth / 2)}
    argunit = s
    fununit = m

Couplings
  intop1: Integration "Upper_surf" on boundaries 13

Common definitions
  free1: DeformingDomain on domains 1
  fix1: FixedBoundary on boundaries 3
  pnmd1: PrescribedNormalMeshDisplacement on boundaries 4 | prescribedNormalDisplacement = -pw1(t)
  pnmd2: PrescribedNormalMeshDisplacement on boundaries 1, 2, 18, 23

Geometry
  geom1 "Beam" (3D, length unit mm)
    cyl1: Cylinder "TPU_cylinder" | r = TPU_R; h = TPU_L
    cyl2: Cylinder "MR_cylinder" | r = MR_R; h = MR_L; pos = {0, 0, (TPU_L - MR_L)/2}
    cyl3: Cylinder "Air" | r = Air_R; h = Air_L; pos = {0, 0, -Air_L/2+TPU_L/2}
    blk1: Block "Magnet" | size = {MT_L, MT_L, MT_L}; base = center; pos = {0, 0, -MT_L/2}
    fin: Finalize "Form Union"

Materials
  Flexfill_TPU_92A: Common "TPU" on domains 3
    def: def "Basic"
      density = 1200
      relpermeability = 1
    Enu: Enu "Young's modulus and Poisson's ratio"
      E = 7.5[MPa]
      nu = 0.45
  MR_E_eq_lin: Common "MR_fluid" on domains 4
    def: def "Basic"
      relpermeability = 6.5
      density = 3200
    Enu: Enu "Young's modulus and Poisson's ratio"
      E = E_eq_lin(mfnc.normH)
      nu = 0.49
  mat1: Common "Air" on domains 1
    def: def "Basic"
      thermalexpansioncoefficient = alpha_p(pA,T)
      molarmass = 0.02897[kg/mol]
      bulkviscosity = muB(T)
      relpermeability = 1
      relpermittivity = 1
      dynamicviscosity = eta(T)
      ratioofspecificheat = 1.4
      electricconductivity = 0[S/m]
      heatcapacity = Cp(T)
      density = rho(pA,T)
      thermalconductivity = k(T)
      soundspeed = cs(T)
      eta: Piecewise | arg = T; pieces = {200.0, 1600.0, -8.38278E-7+8.35717342E-8*T^1-7.69429583E-11*T^2+4.6437266E-14*T^3-1.06585607E-17*T^4}; argunit = K; fununit = Pa*s
      Cp: Piecewise | arg = T; pieces = {200.0, 1600.0, 1047.63657-0.372589265*T^1+9.45304214E-4*T^2-6.02409443E-7*T^3+1.2858961E-10*T^4}; argunit = K; fununit = J/(kg*K)
      rho: Analytic | expr = pA*0.02897/R_const[K*mol/J]/T; args = {pA, T}; fununit = kg/m^3; argunit = {Pa, K}
      k: Piecewise | arg = T; pieces = {200.0, 1600.0, -0.00227583562+1.15480022E-4*T^1-7.90252856E-8*T^2+4.11702505E-11*T^3-7.43864331E-15*T^4}; argunit = K; fununit = W/(m*K)
      cs: Analytic | expr = sqrt(1.4*R_const[K*mol/J]/0.02897*T); args = T; fununit = m/s; argunit = K
      an1: Analytic | funcname = alpha_p; expr = -1/rho(pA,T)*d(rho(pA,T),T); args = {pA, T}; fununit = 1/K; argunit = {Pa, K}
      an2: Analytic "Analytic 2a" | funcname = muB; expr = 0.6*eta(T); args = T; fununit = Pa*s; argunit = K
    RefractiveIndex: RefractiveIndex
      n = 1
      ki = 0
    NonlinearModel: NonlinearModel
      BA = def.gamma-1
    idealGas: idealGas
      Rs = R_const/Mn
      heatcapacity = Cp(T)
      ratioofspecificheat = 1.4
      molarmass = 0.02897[kg/mol]
      Cp: Piecewise | arg = T; pieces = {200.0, 1600.0, 1047.63657-0.372589265*T^1+9.45304214E-4*T^2-6.02409443E-7*T^3+1.2858961E-10*T^4}; argunit = K; fununit = J/(kg*K)

Physics
  solid: SolidMechanics on domains 3, 4
    dependent variable u = {u, v, w}
    lemm1: LinearElasticModel "Linear Elastic Material 1" (default)
    free1: Free (default)
    init1: init "Initial Values 1" (default)
    disp1: Displacement2 "Compression_Z" on boundaries 13
      Direction = {prescribed, prescribed, prescribed}
      U0 = {0, 0, -pw1(t)}
    disp2: Displacement2 "Bottom_BC" on no boundaries | Direction = {prescribed, prescribed, prescribed}
  mfnc: MagnetostaticsNoCurrents "Magnetic Fields, No Currents" on all domains
    dependent variable Vm
    fsp1: FreeSpace (default)
    mi1: MagneticInsulation (default)
    init1: init "Initial Values 1" (default)
    mfcs1: MagneticFluxConservationSolid "Magnetic Flux Conservation in Solids 1" on domains 1, 3, 4 | mur_mat = from_mat
    mag1: Magnet on domains 2
      DirectionMethod = SpecifyNorthSouthBoudaries
      mur_crel_BH_RemanentFluxDensity_mat = userdef
      mur_crel_BH_RemanentFluxDensity = 1
      normBr_crel_BH_RemanentFluxDensity_mat = userdef
      normBr_crel_BH_RemanentFluxDensity = B_magn
      north1: North on boundaries 8, 12
      south1: South on boundaries 7

Mesh
  mesh1 "Mesh 1" (physics-controlled)

Studies
  std1 "Study 1"
    param: Parametric "Parametric Sweep" | pname = B_magn; plistarr = 0,0.25, 0.5, 0.75, 1; punit = T
    stat: Stationary (disabled) | solve for = {mfnc, comp1}
    time: Transient "Time Dependent" | tlist = range(0,t_end/t_step,t_end); initstudy = zero

Solver configurations
  sol1 "Solution 1" (study std1)
    v1: Variables "Dependent Variables 1"
    t1: Time "Time-Dependent Solver 1"
      dDef: Direct
      se1: Segregated
        ss1: SegregatedStep "Magnetic Fields, No Currents"
        ss2: SegregatedStep "Solid Mechanics"
        ss3: SegregatedStep "Spatial Frame Variables"
      i1: Iterative
        mg1: Multigrid
      d1: Direct "Suggested Direct Solver (solid)"
  sol3 "Parametric Solutions 1" (study std1)
  sol9 "Parametric Solutions 2" (study std1)
  sol13 "Parametric Solutions 3" (study std1)

Datasets
  dset1: Solution | solution = sol1
  dset2: Solution | solution = sol3
  dset3: Solution | solution = sol9
  dset4: Solution | solution = sol13

Plots
  pg1: PlotGroup3D "Stress (solid)" | data = dset1
    vol1: Volume | expr = solid.sz; unit = N/m^2
      def: Deform "Deformation" | expr = {u, v, w}; descr = Displacement field
  pg6: PlotGroup1D "Stress-strain_integral" | data = dset1; xlabel = Strain; ylabel = Stress
    glob2: Global
      expr = abs(intop1(solid.sz))/(pi*TPU_R^2)
      unit = N/m^2
      title = STRESS - STRAIN
      xdata = expr
      xdataexpr = abs(v_comp*t)/ TPU_L
      resultinfo = 
        {Plotting_time, 0.7 s}
        {Physical_memory, 3.47 GB}
        {Virtual_memory, 3.72 GB}
        {Number_of_points, 85}
        {Number_of_segments[plot], 84}
  pg9: PlotGroup1D "Stress-strain_reaction_force" | data = dset1; xlabel = Strain (1); ylabel = Stress (N/mm<sup>2</sup>)
    ptgr1: PointGraph on points 8, 14, 20, 26
      expr = solid.fix1.RFsumz/(pi*TPU_R^2)
      descr = Stress
      title = STRESS - STRAIN (reaction force)
      xdata = expr
      xdataexpr = solid.disp/TPU_L
  pg10: PlotGroup1D "Reaction force" | data = dset1
    lngr1: LineGraph on edges 15, 16, 28, 37 | expr = solid.fix1.RFsumz; xdata = expr; xdataexpr = t
  pg3: PlotGroup1D "Kin.En vs strain en." | data = dset4
    glob1: Global | expr = {solid.Wk_tot, solid.Ws_tot}; descr = {Total kinetic energy, Total elastic strain energy}
  pg4: PlotGroup3D "Stress (solid) 1" | data = dset3
    vol1: Volume | expr = solid.misesGp
      def: Deform "Deformation" | expr = {u, v, w}; descr = Displacement field
  pg5: PlotGroup3D "Stress (solid) 2" | data = dset4
    vol1: Volume | expr = solid.misesGp