// COMSOL Multiphysics 6.4.0.343 model "4_Simple_TPU_MR_beam_MF_Magnet_E_eq_lin_BH_axial.mph"
// Outline of the model tree

Parameters
  Air_L = 3*TPU_L  // Air cube side length
  E_min = 10 [kPa]  // No Magnetic field applied
  E_max = 21 [MPa]  // Maximum magnetic field applied
  H_max = 224[kA/m]  // Max magnetic field
  H_test = 100[kA/m]  // Trial magnetic field
  MT_L = 0.5*TPU_L
  v_comp = 50 [mm/s]  // Compression rate
  c_max = 0.05*TPU_L  // Max compression imposed
  t_end = c_max/v_comp  // end time of the compression
  t_step = 100  // time steps for the simulation
  t_smooth = 0.1* t_end
  t_tot = t_end+ t_smooth
  B_magn = 1[T]
  TPU_L = 40[mm]  // TPU beam Lenght
  MR_L = TPU_L - TPU_th  // MR fluid lenght
  TPU_R = TPU_L/ratio  // TPU beam radius
  TPU_th = 0.05*TPU_L  // TPU beam thickness
  MR_R = TPU_R - TPU_th  // MR fluid radius
  ratio = 9.95  // paraemteric L/R ratio

Functions
  an1: Analytic | funcname = E_eq_lin; expr = 0.001 + 188.58 * H; args = H; fununit = kPa; argunit = kA/m
  pw2: Piecewise "smooth_displacement"
    funcname = pw1
    arg = t
    pieces = 
      {0, t_smooth, (v_comp / (2 * t_smooth)) * t^2}
      {t_smooth, t_end *2, v_comp * (t - t_smooth / 2)}
    argunit = s
    fununit = m

Selections
  sel1: Explicit on boundaries 7

Couplings
  intop1: Integration on boundaries 12 | axisym = on

Common definitions
  free1: DeformingDomain on domains 1
  pnmd1: PrescribedNormalMeshDisplacement on boundaries 13 | prescribedNormalDisplacement = -pw1(t)
  pnmd2: PrescribedNormalMeshDisplacement on boundaries 11, 18

Geometry
  geom1 "Geometry 1" (2D axisymmetric, length unit m)
    r1: Rectangle | size = {TPU_R, TPU_L}
    r2: Rectangle | size = {MR_R, MR_L}; pos = {0, TPU_L/2 - MR_L/2}
    r3: Rectangle | size = {MT_L/2, MT_L}; pos = {0, -MT_L}
    r4: Rectangle | size = {Air_L/2, Air_L}; pos = {0, -TPU_L/2 + (-Air_L/2 + TPU_L/2)/2}
    fin: Finalize "Form Union" | symmetriccoord = 8
  autodeform1 "Deformed Configuration 1" (2D axisymmetric, length unit m)
    frommesh1: FromMesh "Deformed Configuration 1" | solution = sol1; t = 0.043714
  autodeform2 "Deformed Configuration 2" (2D axisymmetric, length unit m)
    frommesh2: FromMesh "Deformed Configuration 2" | solution = sol1; t = 0.043714
  autodeform3 "Deformed Configuration 3" (2D axisymmetric, length unit m)
    frommesh3: FromMesh "Deformed Configuration 3" | solution = sol1; t = 0.043714
  autodeform4 "Deformed Configuration 4" (2D axisymmetric, length unit m)
    frommesh4: FromMesh "Deformed Configuration 4" | solution = sol1; t = 0.043714
  autodeform5 "Deformed Configuration 5" (2D axisymmetric, length unit m)
    frommesh5: FromMesh "Deformed Configuration 5" | solution = sol1; t = 0.043714
  autodeform6 "Deformed Configuration 6" (2D axisymmetric, length unit m)
    frommesh6: FromMesh "Deformed Configuration 6" | solution = sol1; t = 0.043714
  autodeform7 "Deformed Configuration 7" (2D axisymmetric, length unit m)
    frommesh7: FromMesh "Deformed Configuration 7" | solution = sol1; t = 0.043714
  autodeform8 "Deformed Configuration 8" (2D axisymmetric, length unit m)
    frommesh8: FromMesh "Deformed Configuration 8" | solution = sol1; t = 0.043714
  autodeform9 "Deformed Configuration 9" (2D axisymmetric, length unit m)
    frommesh9: FromMesh "Deformed Configuration 9" | solution = sol1; t = 0.043714
  autodeform10 "Deformed Configuration 10" (2D axisymmetric, length unit m)
    frommesh10: FromMesh "Deformed Configuration 10" | solution = sol1; t = 0.043714
  autodeform11 "Deformed Configuration 11" (2D axisymmetric, length unit m)
    frommesh11: FromMesh "Deformed Configuration 11" | solution = sol1; t = 0.043714
  autodeform12 "Deformed Configuration 12" (2D axisymmetric, length unit m)
    frommesh12: FromMesh "Deformed Configuration 12" | solution = sol1; t = 0.043714
  autodeform13 "Deformed Configuration 13" (2D axisymmetric, length unit m)
    frommesh13: FromMesh "Deformed Configuration 13" | solution = sol1; t = 0.043714
  autodeform14 "Deformed Configuration 14" (2D axisymmetric, length unit m)
    frommesh14: FromMesh "Deformed Configuration 14" | solution = sol1; t = 0.043714
  autodeform15 "Deformed Configuration 15" (2D axisymmetric, length unit m)
    frommesh15: FromMesh "Deformed Configuration 15" | solution = sol1; t = 0.043714
  autodeform16 "Deformed Configuration 16" (2D axisymmetric, length unit m)
    frommesh16: FromMesh "Deformed Configuration 16" | solution = sol1; t = 0.043714
  autodeform17 "Deformed Configuration 17" (2D axisymmetric, length unit m)
    frommesh17: FromMesh "Deformed Configuration 17" | solution = sol1; t = 0.043714

Materials
  mat1: Common "TPU" on domains 3
    def: def "Basic"
      density = 1200
      relpermeability = 1
      relpermittivity = 1
    Enu: Enu "Young's modulus and Poisson's ratio"
      E = 7.5[MPa]
      nu = 0.45
  mat2: Common "Air" on domains 1
    def: def "Basic"
      thermalexpansioncoefficient = alpha_p(pA,T)
      molarmass = 0.02897[kg/mol]
      bulkviscosity = muB(T)
      relpermeability = 1
      relpermittivity = 1
      dynamicviscosity = eta(T)
      ratioofspecificheat = 1.4
      electricconductivity = 0[S/m]
      heatcapacity = Cp(T)
      density = rho(pA,T)
      thermalconductivity = k(T)
      soundspeed = cs(T)
      eta: Piecewise | arg = T; pieces = {200.0, 1600.0, -8.38278E-7+8.35717342E-8*T^1-7.69429583E-11*T^2+4.6437266E-14*T^3-1.06585607E-17*T^4}; argunit = K; fununit = Pa*s
      Cp: Piecewise | arg = T; pieces = {200.0, 1600.0, 1047.63657-0.372589265*T^1+9.45304214E-4*T^2-6.02409443E-7*T^3+1.2858961E-10*T^4}; argunit = K; fununit = J/(kg*K)
      rho: Analytic | expr = pA*0.02897/R_const[K*mol/J]/T; args = {pA, T}; fununit = kg/m^3; argunit = {Pa, K}
      k: Piecewise | arg = T; pieces = {200.0, 1600.0, -0.00227583562+1.15480022E-4*T^1-7.90252856E-8*T^2+4.11702505E-11*T^3-7.43864331E-15*T^4}; argunit = K; fununit = W/(m*K)
      cs: Analytic | expr = sqrt(1.4*R_const[K*mol/J]/0.02897*T); args = T; fununit = m/s; argunit = K
      an1: Analytic | funcname = alpha_p; expr = -1/rho(pA,T)*d(rho(pA,T),T); args = {pA, T}; fununit = 1/K; argunit = {Pa, K}
      an2: Analytic "Analytic 2a" | funcname = muB; expr = 0.6*eta(T); args = T; fununit = Pa*s; argunit = K
    RefractiveIndex: RefractiveIndex
      n = 1
      ki = 0
    NonlinearModel: NonlinearModel
      BA = def.gamma-1
    idealGas: idealGas
      Rs = R_const/Mn
      heatcapacity = Cp(T)
      ratioofspecificheat = 1.4
      molarmass = 0.02897[kg/mol]
      Cp: Piecewise | arg = T; pieces = {200.0, 1600.0, 1047.63657-0.372589265*T^1+9.45304214E-4*T^2-6.02409443E-7*T^3+1.2858961E-10*T^4}; argunit = K; fununit = J/(kg*K)
  mat4: Common "MR_fluid_BH_E_lin" on domains 4
    def: def "Basic"
      relpermeability = 6.5
      density = 3200
    Enu: Enu "Young's modulus and Poisson's ratio"
      E = E_eq_lin(mfnc.normH)
      nu = 0.49
    BHCurve: BHCurve
      normB = BH(normHin)
      normH = BH_inv(normBin)
      Wpm = BH_prim(normHin)
      normHin = sqrt(H1^2+H2^2+H3^2+eps)
      DESCR_PREFIX:normHin = normHin
      normBin = sqrt(B1^2+B2^2+B3^2+eps)
      DESCR_PREFIX:normBin = normBin
      int2: Interpolation
        funcnametable = {int2, 1}
        funcname = BH
        table = 
          {0, 0}
          {1.61758524016, 0.0121076673844}
          {6.0339206334, 0.0507172166827}
          {10.4502560266, 0.0902108556106}
          {15.1610137794, 0.13447986918}
          {19.5773491727, 0.175135085724}
          {23.6992622064, 0.209208029112}
          {28.1155975996, 0.248992062444}
          {32.8263553524, 0.290099003616}
          {37.5371131052, 0.330302495531}
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        extrap = linear
        fununit = T
        argunit = kA/m
        plotfuncname = BH
        plotleftextrap = off
        defineinv = on
        defineprimfun = on

Physics
  solid: SolidMechanics on domains 3, 4
    dependent variable u = {u, v, w}
    lemm1: LinearElasticModel "Linear Elastic Material 1" (default)
    axi1: AxialSymmetrySolid "Axial Symmetry 1" (default)
    free1: Free (default)
    init1: init "Initial Values 1" (default)
    disp2: Displacement1 "Prescribed Displacement 2" on boundaries 12
      Direction = {prescribed, free, prescribed}
      U0 = {0, 0, -pw1(t)}
    fix1: Fixed "Fixed Constraint 1" on boundaries 6
  mfnc: MagnetostaticsNoCurrents "Magnetic Fields, No Currents" on domains 1-4
    dependent variable Vm
    fsp1: FreeSpace (default)
    axi1: AxialSymmetry (default)
    mi1: MagneticInsulation (default)
    init1: init "Initial Values 1" (default)
    mag1: Magnet on domains 2
      mur_crel_BH_RemanentFluxDensity_mat = userdef
      mur_crel_BH_RemanentFluxDensity = 1
      normBr_crel_BH_RemanentFluxDensity_mat = userdef
      normBr_crel_BH_RemanentFluxDensity = B_magn
      north1: North on boundaries 6, 16
      south1: South on boundaries 4
    mfcs1: MagneticFluxConservationSolid "Magnetic Flux Conservation in Solids 1" on domains 3
    mfcs2: MagneticFluxConservationSolid "Magnetic Flux Conservation in Solids 2" on domains 4
      ConstitutiveRelationBH = BHCurve
    zsp1: ZeroMagneticScalarPotential on boundaries 2, 13, 18

Mesh
  mesh1 "Mesh 1" (physics-controlled)
    size: MeshSizeDefault | hauto = 3
  mesh2 "Mesh 2"
    size: MeshSizeDefault | hmax = 0.00795; hmin = 3.56E-5; hcurve = 0.3; hgrad = 1.3
    ref1: Reference | sequence = mesh1
  mesh3 "Mesh 3"
    size: MeshSizeDefault | hmax = 0.00793; hmin = 3.55E-5; hcurve = 0.3; hgrad = 1.3
    ref1: Reference | sequence = mesh1
  mesh4 "Mesh 4"
    size: MeshSizeDefault | hmax = 0.00791; hmin = 3.54E-5; hcurve = 0.3; hgrad = 1.3
    ref1: Reference | sequence = mesh1
  mesh5 "Mesh 5"
    size: MeshSizeDefault | hmax = 0.00791; hmin = 3.54E-5; hcurve = 0.3; hgrad = 1.3
    ref1: Reference | sequence = mesh1
  mesh6 "Mesh 6"
    size: MeshSizeDefault | hmax = 0.00791; hmin = 3.54E-5; hcurve = 0.3; hgrad = 1.3
    ref1: Reference | sequence = mesh1
  mesh7 "Mesh 7"
    size: MeshSizeDefault | hmax = 0.0079; hmin = 3.54E-5; hcurve = 0.3; hgrad = 1.3
    ref1: Reference | sequence = mesh1
  mesh8 "Mesh 8"
    size: MeshSizeDefault | hmax = 0.0079; hmin = 3.54E-5; hcurve = 0.3; hgrad = 1.3
    ref1: Reference | sequence = mesh1
  mesh9 "Mesh 9"
    size: MeshSizeDefault | hmax = 0.0079; hmin = 3.54E-5; hcurve = 0.3; hgrad = 1.3
    ref1: Reference | sequence = mesh1
  mesh10 "Mesh 10"
    size: MeshSizeDefault | hmax = 0.0079; hmin = 3.54E-5; hcurve = 0.3; hgrad = 1.3
    ref1: Reference | sequence = mesh1
  mesh11 "Mesh 11"
    size: MeshSizeDefault | hmax = 0.0079; hmin = 3.54E-5; hcurve = 0.3; hgrad = 1.3
    ref1: Reference | sequence = mesh1
  mesh12 "Mesh 12"
    size: MeshSizeDefault | hmax = 0.00789; hmin = 3.53E-5; hcurve = 0.3; hgrad = 1.3
    ref1: Reference | sequence = mesh1
  mesh13 "Mesh 13"
    size: MeshSizeDefault | hmax = 0.00789; hmin = 3.53E-5; hcurve = 0.3; hgrad = 1.3
    ref1: Reference | sequence = mesh1
  mesh14 "Mesh 14"
    size: MeshSizeDefault | hmax = 0.00789; hmin = 3.53E-5; hcurve = 0.3; hgrad = 1.3
    ref1: Reference | sequence = mesh1
  mesh15 "Mesh 15"
    size: MeshSizeDefault | hmax = 0.00789; hmin = 3.53E-5; hcurve = 0.3; hgrad = 1.3
    ref1: Reference | sequence = mesh1
  mesh16 "Mesh 16"
    size: MeshSizeDefault | hmax = 0.00789; hmin = 3.53E-5; hcurve = 0.3; hgrad = 1.3
    ref1: Reference | sequence = mesh1
  mesh17 "Mesh 17"
    size: MeshSizeDefault | hmax = 0.00789; hmin = 3.53E-5; hcurve = 0.3; hgrad = 1.3
    ref1: Reference | sequence = mesh1
  mesh18 "Mesh 18"
    size: MeshSizeDefault | hmax = 0.00789; hmin = 3.53E-5; hcurve = 0.3; hgrad = 1.3
    ref1: Reference | sequence = mesh1

Studies
  std1 "Study 1"
    param: Parametric "Parametric Sweep" | pname = B_magn; plistarr = range(0, 0.2, 1.2); punit = T
    time: Transient "Time Dependent" | tlist = range(0,t_tot/t_step,t_tot); geometricNonlinearity = on

Solver configurations
  sol1 "Solution 1" (study std1)
    v1: Variables "Dependent Variables 1"
    t1: Time "Time-Dependent Solver 1"
      dDef: Direct
      fc1: FullyCoupled | dtech = auto
  sol6 "Remeshed Solution 1" (study std1)
  sol10 "Parametric Solutions 2" (study std1)

Datasets
  dset3: Solution | solution = sol10
  dset3solidrev: Revolve2D "Revolution 2D 3" | data = dset3; startangle = -90; revangle = 225
  mesh1: Mesh | mesh = mesh1
  dset4: Solution | solution = sol1
  dset5: Solution | solution = sol6

Plots
  pg22: PlotGroup2D "Stress (solid) 2" | data = dset3
    surf1: Surface | expr = solid.misesGp
      def: Deform "Deformation" | expr = {u, w}; descr = Displacement field
  pg23: PlotGroup3D "Stress, 3D (solid) 2" | data = dset3solidrev
    surf1: Surface | expr = solid.misesGp
      def: Deform "Deformation" | revcoordsys = cylindrical; expr = {u, v, w}; descr = Displacement field
  pg3: PlotGroup1D "Stress-strain_integral" | data = dset3; xlabel = Strain; ylabel = Stress
    glob2: Global
      expr = abs(intop1(solid.sz))/(pi*TPU_R^2)
      unit = N/mm^2
      constUnit = {m, m, m}
      title = STRESS - STRAIN
      hasmultilevel = on
      xdata = expr
      xdataexpr = abs(v_comp*t)/ TPU_L
      resultinfo = 
        {Plotting_time, 1.9 s}
        {Physical_memory, 1.96 GB}
        {Virtual_memory, 2.06 GB}
        {Number_of_points, 707}
        {Number_of_segments[plot], 700}
  pg9: PlotGroup1D "Stress-strain_reaction_force" | data = dset3; xlabel = Strain (1); ylabel = Stress (N/mm<sup>2</sup>)
    ptgr1: PointGraph on points 6
      expr = solid.fix1.RFsumz/(pi*TPU_R^2)
      unit = N/mm^2
      descr = Stress
      constUnit = {m, m, m}
      title = STRESS - STRAIN (reaction force)
      hasmultilevel = on
      xdata = expr
      xdataexpr = solid.disp/TPU_L
      autopoint = off
      resultinfo = 
        {Plotting_time, 2.0 s}
        {Physical_memory, 1.88 GB}
        {Virtual_memory, 2.00 GB}
        {Number_of_points, 707}
        {Number_of_segments[plot], 700}
  pg27: PlotGroup1D "Reaction force" | data = dset3
    lngr1: LineGraph on boundaries 6
      expr = solid.fix1.RFsumz
      unit = N
      descr = Reaction force, z-component
      constUnit = {m, m, m}
      xdata = expr
      xdataexpr = t
      legends = {"B_magn=0 T, Time=0 s", "B_magn=0 T, Time=3.974E-4 s", "B_magn=0 T, Time=7.948E-4 s", "B_magn=0 T, Time=0.0011922 s", "B_magn=0 T, Time=0.0015896 s", "B_magn=0 T, Time=0.001987 s", "B_magn=0 T, Time=0.0023844 s", "B_magn=0 T, Time=0.0027818 s", "B_magn=0 T, Time=0.0031792 s", "B_magn=0 T, Time=0.0035766 s"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}
      resultinfo = 
        {Plotting_time, 0.8 s}
        {Physical_memory, 2.85 GB}
        {Virtual_memory, 2.98 GB}
        {Number_of_points, 707}
        {Number_of_segments[plot], 0}
  pg28: PlotGroup1D "Magnetic field norm (A/m)"
    data = dset3
    xlabel = Arc length (m)
    ylabel = Magnetic field norm (A/m)
    lngr1: LineGraph on selection sel1 | expr = mfnc.normH; descr = Magnetic field norm
  pg10: PlotGroup2D "Magnetic Flux Density (mfnc) 1" | data = dset3
    surf1: Surface | expr = mfnc.normB
    str1: Streamline on boundaries 1, 3, 5-12, 14, 15 | expr = {mfnc.Br, mfnc.Bz}
      filt1: Filter | expr = !isScalingSystemDomain
  pg11: PlotGroup3D "Magnetic Flux Density, Revolved Geometry (mfnc) 1" | data = dset3solidrev
    vol1: Volume | expr = mfnc.normB
  pg12: PlotGroup2D "Magnetic Scalar Potential (mfnc) 1" | data = dset3
    surf1: Surface | expr = Vm
    str1: Streamline on boundaries 1, 3, 5-12, 14, 15 | expr = {mfnc.Hr, mfnc.Hz}
      filt1: Filter | expr = !isScalingSystemDomain

Exports
  plot1: Plot "Export magnetic field norm H" | filename = C:\Users\andre\Desktop\COMSOL_LOCAL\NormH_MRF_BHcurve.txt
  plot2: Plot "Export stress-strain (reaction force)"
    filename = C:\Users\andre\Desktop\COMSOL_LOCAL\Stress_strain_BHcurve.txt